// COMSOL Multiphysics 6.2.0.290 model "Droplet_Rough_Surfaces_2D_Axi-We10.mph"
// Outline of the model tree

Parameters
  H_pv = 0.2
  Period = 0.2
  Amp = H_pv / 2
  K_w = 2*pi/Period
  width = 3
  height = 6
  depth = 0.1
  Bo = 0.7
  Oh = 0.0025
  We = 10
  Bo1 = Bo/4
  Oh1 = Oh*1.414
  We1 = We/2
  sigma = 1/We1
  mu1 = Oh1/We1^0.5
  mu2 = 1e-5
  v0 = 1
  g_used = -Bo1/We1
  rho1 = 1
  rho2 = 0.001
  mesh = 0.005
  mesh1 = 1
  xc = 0
  yc = depth*0.5
  zc = 1+0.15
  R0 = 1

Geometry
  geom1 "Geometry 1" (2D axisymmetric, length unit m)
    r1: Rectangle | size = {width, height}
    r2: Rectangle | pos = {1.5, 1.5}; size = {width-1.5, height-1.5}
    dif1: Difference | input = r1; input2 = r2
    c1: Circle | pos = {0, zc}; rot = -90; angle = 180
    fin: Finalize "Form Union"

Materials
  mat1: Common "Water, liquid" on all domains
    def "Basic"
      thermalexpansioncoefficient = alpha_p(T)
      bulkviscosity = muB(T)
      dynamicviscosity = mu1
      ratioofspecificheat = gamma_w(T)
      electricconductivity = 5.5e-6[S/m]
      heatcapacity = Cp(T)
      density = rho1
      thermalconductivity = k(T)
      soundspeed = cs(T)
      eta: Piecewise
        arg = T
        pieces = 
          {273.15, 413.15, 1.3799566804-0.021224019151*T^1+1.3604562827E-4*T^2-4.6454090319E-7*T^3+8.9042735735E-10*T^4-9.0790692686E-13*T^5+3.8457331488E-16*T^6}
          {413.15, 553.75, 0.00401235783-2.10746715E-5*T^1+3.85772275E-8*T^2-2.39730284E-11*T^3}
        argunit = K
        fununit = Pa*s
      Cp: Piecewise | arg = T; pieces = {273.15, 553.75, 12010.1471-80.4072879*T^1+0.309866854*T^2-5.38186884E-4*T^3+3.62536437E-7*T^4}; argunit = K; fununit = J/(kg*K)
      rho: Piecewise
        arg = T
        smooth = contd1
        pieces = 
          {273.15, 293.15, 6.3092789034e-05*T^3-0.0603676398829*T^2+18.9229382407066*T-950.704055329848}
          {293.15, 373.15, 1.0335053319e-05*T^3-0.0133950656345*T^2+4.96928883266*T+432.257114008512}
        argunit = K
        fununit = kg/m^3
      k: Piecewise | arg = T; pieces = {273.15, 553.75, -0.869083936+0.00894880345*T^1-1.58366345E-5*T^2+7.97543259E-9*T^3}; argunit = K; fununit = W/(m*K)
      cs: Interpolation | table = {{273, 1403}, {278, 1427}, {283, 1447}, {293, 1481}, {303, 1507}, {313, 1526}, {323, 1541}, {333, 1552}, {343, 1555}, {353, 1555}, {363, 1550}, {373, 1543}}; interp = piecewisecubic; fununit = m/s; argunit = K
      an1: Analytic | funcname = alpha_p; expr = -1/rho(T)*d(rho(T),T); args = T; fununit = 1/K; argunit = K
      an2: Analytic | funcname = gamma_w; expr = 1+(T/Cp(T))*(alpha_p(T)*cs(T))^2; args = T; fununit = 1; argunit = K
      an3: Analytic | funcname = muB; expr = 2.79*eta(T); args = T; fununit = Pa*s; argunit = K
  mat2: Common "Air" on no domains
    def "Basic"
      thermalexpansioncoefficient = alpha_p(pA,T)
      molarmass = 0.02897[kg/mol]
      bulkviscosity = muB(T)
      relpermeability = 1
      relpermittivity = 1
      dynamicviscosity = mu2
      ratioofspecificheat = 1.4
      electricconductivity = 0[S/m]
      heatcapacity = Cp(T)
      density = rho2
      thermalconductivity = k(T)
      soundspeed = cs(T)
      eta: Piecewise | arg = T; pieces = {200.0, 1600.0, -8.38278E-7+8.35717342E-8*T^1-7.69429583E-11*T^2+4.6437266E-14*T^3-1.06585607E-17*T^4}; argunit = K; fununit = Pa*s
      Cp: Piecewise | arg = T; pieces = {200.0, 1600.0, 1047.63657-0.372589265*T^1+9.45304214E-4*T^2-6.02409443E-7*T^3+1.2858961E-10*T^4}; argunit = K; fununit = J/(kg*K)
      rho: Analytic | expr = pA*0.02897/R_const[K*mol/J]/T; args = {pA, T}; fununit = kg/m^3; argunit = {Pa, K}
      k: Piecewise | arg = T; pieces = {200.0, 1600.0, -0.00227583562+1.15480022E-4*T^1-7.90252856E-8*T^2+4.11702505E-11*T^3-7.43864331E-15*T^4}; argunit = K; fununit = W/(m*K)
      cs: Analytic | expr = sqrt(1.4*R_const[K*mol/J]/0.02897*T); args = T; fununit = m/s; argunit = K
      an1: Analytic | funcname = alpha_p; expr = -1/rho(pA,T)*d(rho(pA,T),T); args = {pA, T}; fununit = 1/K; argunit = {Pa, K}
      an2: Analytic "Analytic 2a" | funcname = muB; expr = 0.6*eta(T); args = T; fununit = Pa*s; argunit = K
    RefractiveIndex
      n = 1
      ki = 0
    NonlinearModel
      BA = def.gamma-1
    idealGas
      Rs = R_const/Mn
      heatcapacity = Cp(T)
      ratioofspecificheat = 1.4
      molarmass = 0.02897
      Cp: Piecewise | arg = T; pieces = {200.0, 1600.0, 1047.63657-0.372589265*T^1+9.45304214E-4*T^2-6.02409443E-7*T^3+1.2858961E-10*T^4}; argunit = K; fununit = J/(kg*K)

Physics
  spf: LaminarFlow on all domains
    dependent variable u = {u, v, w}
    fp1: FluidProperties (default)
    init1: init "Initial Values 1" (default)
    axi1: AxialSymmetry (default)
    wallbc1: WallBC "Wall 1" (default)
    init2: init "Initial Values 2" on domains 2 | u_init = {0, 0, -v0}
    inl1: InletBoundary "Inlet 1" on boundaries 7-9
    out1: OutletBoundary "Outlet 1" on boundaries 6
  ls: LevelSet on all domains
    dependent variable phils
    AdvancedSettingProperty.ConvectiveTerm = NonConservativeForm
    lsm1: LevelSetModel (default) | epsilon_ls = mesh/2
    init1: init "Initial Values 1" (default)
    initfluid2: initFluid2 "Initial Values, Fluid 2" on domains 1
    axi1: AxialSymmetry (default)
    nf1: NoFlow (default)
    inl1: InletBoundary "Inlet 1" on boundaries 7-9 | lscond = Fluid2ls
    out1: Outlet on boundaries 6

Multiphysics
  tpf1: TwoPhaseFlowLevelSet on all domains
    Fluid1 = mat1
    Fluid2 = mat2
    IncludeSurfaceTension = 1
    SurfaceTensionCoefficient = userdef
    sigma = sigma
    Fluid_physics = spf
    Mathematics_physics = ls
  ww1: WettedWall on boundaries 2 | thetaw = 20/180*pi; Fluid_physics = spf; Mathematics_physics = ls

Mesh
  mesh1 "Mesh 1"
    size: MeshSizeDefault | hmax = 0.402; hmin = 0.0018; hcurve = 0.3; hgrad = 1.3
    ftri1: FreeTri "Free Triangular 1" on all domains
      size1: Size on domains 1, 2 | table = cfd; hmax = mesh; custom = on

Studies
  std1 "Study 1"
    phasei: PhaseInitialization | solve for = {ls}
    time: Transient "Time Dependent"
      tlist = range(0,0.01,3)
      initialtime = 0
      useinitsol = on
      initstudy = std1
      notsolmethod = sol
      notstudy = std1

Solver configurations
  sol1 "Solution 1" (study std1)
    v1: Variables "Dependent Variables 1"
    s1: Stationary "Stationary Solver 1"
      fc1: FullyCoupled | linsolver = d1; initstep = 0.01; minstep = 1.0E-6; maxiter = 50
      d1: Direct "Direct, interface distance (ls)" | linsolver = pardiso; pivotperturb = 1.0E-13
    su1: StoreSolution "Solution Store 1"
    v2: Variables "Dependent Variables 2" | notsolmethod = sol
      comp1_phils: Field "Level set variable (comp1.phils)" | scalemethod = manual; scaleval = 1
    t1: Time "Time-Dependent Solver 1"
      tlist = range(0,0.01,3)
      rtol = 0.005
      atolglobalfactor = 0.05
      atolmethod = {comp1_GI, global, comp1_p, scaled, comp1_phils, scaled, comp1_u, global}
      atolvaluemethod = {comp1_GI, factor, comp1_p, factor, comp1_phils, factor, comp1_u, factor}
      atolfactor = {comp1_GI, 0.1, comp1_p, 1, comp1_phils, 0.01, comp1_u, 0.1}
      maxstepbdf = 0.001
      maxorder = 2
      eventtol = 0.001
      stabcntrl = on
      bwinitstepfrac = 0.01
      estrat = exclude
      rhoinf = 0.5
      predictor = constant
      rescaleafterinitbw = on
      se1: Segregated
        maxsegiter = 10
        ntolfact = 0.5
        segstabacc = segaacc
        segaaccdim = 5
        segaaccmix = 0.9
        segaaccdelay = 1
        ss1: SegregatedStep "Velocity u, Pressure p"
          segvar = {comp1_u, comp1_p}
          linsolver = d1
          subdamp = 0.8
          subjtech = once
        ss2: SegregatedStep "Level Set Variable, Phils"
          segvar = {comp1_phils}
          linsolver = i1
          subdamp = 0.8
          subjtech = once
      d1: Direct "Direct, fluid flow variables (spf)" | linsolver = pardiso; pivotperturb = 1.0E-13
      i1: Iterative "AMG, level set variable (ls)" | maxlinit = 50; rhob = 20
        mg1: Multigrid | prefun = saamg; maxcoarsedof = 50000; saamgcompwise = on
  sol2 "Solution Store 1" (study std1)

Datasets
  dset1: Solution | solution = sol1
  rev1: Revolve2D "Revolution 2D" | data = dset1; startangle = -90; revangle = 225
  rev2: Revolve2D "Revolution 2D 1" | data = dset1
  dset2: Solution | solution = sol2

Plots
  pg1: PlotGroup2D "Velocity (spf)" | data = dset1; dataisaxisym = on
    surf1: Surface | expr = spf.U
  pg2: PlotGroup2D "Pressure (spf)" | data = dset1; dataisaxisym = on
    con1: Contour | expr = p; levelrounding = off
  pg3: PlotGroup3D "Velocity, 3D (spf)" | data = rev1
    surf1: Surface | expr = spf.U
  pg4: PlotGroup2D "Volume Fraction of Fluid 1 (ls)" | data = dset1; dataisaxisym = on
    surf1: Surface | expr = ls.Vf1
    con1: Contour | expr = ls.Vf1; levelmethod = levels; levels = 0.5
  pg5: PlotGroup3D "Volume Fraction of Fluid 1 (ls) 1" | data = rev2
    iso1: Isosurface | expr = ls.Vf1; levelmethod = levels; levels = 0.5

Exports
  anim1: Animation | target = player
  anim2: Animation | target = player
  anim3: Animation | target = player
  anim4: Animation | target = player